<?xml version="1.0" encoding="UTF-8"?>
<!--####################################################################
Lake of Constance Hangar
Boeing 707 for Flightgear
Copyright (C) 2013 M.Kraus

This program is free software: you can redistribute it and/or modify
it under the terms of the GNU General Public License as published by
the Free Software Foundation, either version 3 of the License, or
(at your option) any later version.

This program is distributed in the hope that it will be useful,
but WITHOUT ANY WARRANTY; without even the implied warranty of
MERCHANTABILITY or FITNESS FOR A PARTICULAR PURPOSE.  See the
GNU General Public License for more details.

You should have received a copy of the GNU General Public License
along with this program.  If not, see <http://www.gnu.org/licenses/>.

Every software has a developer, also free software.
As a gesture of courtesy and respect, I would be delighted
if you contacted me before making any changes to this software.
<info (at) marc-kraus.de> April, 2017
########################################################################-->
<!--
  Inputs:
    name:                    TF33-PW-100A
    type:                    Turbine Engine
    thrust:                  21500.0 lbf
    bypass ratio:            3.900:1
    overall pressure ratio:  15.6:1
    augmented?               no
    injected?                no

  Outputs
    tsfc:                    0.7
-->

<turbine_engine name="TF33-PW-100A">
  <milthrust> 21500.0 </milthrust>
  <bypassratio>     3.900 </bypassratio>
  <tsfc>            0.660 </tsfc>
  <bleed>           0.03</bleed>
  <idlen1>         30.0 </idlen1>
  <idlen2>         60.0 </idlen2>
  <maxn1>         100.0 </maxn1>
  <maxn2>         100.0 </maxn2>
  <augmented>         0 </augmented>
  <injected>          0 </injected>

  <function name="IdleThrust">
   <table>
    <independentVar lookup="row">velocities/mach</independentVar>
    <independentVar lookup="column">atmosphere/density-altitude</independentVar>
    <tableData>
         -10000     0     10000   20000   30000   40000   50000   90000
     0.0  0.0430  0.0488  0.0528  0.0694  0.0899  0.1183  0.1467  0
     0.2  0.0500  0.0501  0.0335  0.0544  0.0797  0.1049  0.1342  0
     0.4  0.0040  0.0047  0.0020  0.0272  0.0595  0.0891  0.1203  0
     0.6 -0.0804 -0.0804 -0.0560 -0.0237  0.0276  0.0718  0.1073  0
     0.8 -0.2129 -0.2129 -0.1498 -0.1025  0.0474  0.0868  0.0900  0
     1.0 -0.2839 -0.2839 -0.1104 -0.0469 -0.0270  0.0552  0.0800  0
    </tableData>
   </table>
  </function>

  <function name="MilThrust">
   <table>
    <independentVar lookup="row">velocities/mach</independentVar>
    <independentVar lookup="column">atmosphere/density-altitude</independentVar>
    <tableData>
          -10000       0   10000   20000   30000   40000   50000   60000   90000
      0.0  1.2600  1.0000  0.7400  0.5340  0.3720  0.2410  0.1490  0.0580  0
      0.2  1.0705  0.8539  0.6372  0.4626  0.3245  0.2112  0.1307  0.0366  0
      0.4  0.9527  0.7630  0.5733  0.4192  0.2957  0.1930  0.1201  0.0356  0
      0.6  0.8770  0.7062  0.5354  0.3951  0.2807  0.1842  0.1144  0.0349  0
      0.8  0.8263  0.6699  0.5136  0.3823  0.2739  0.1806  0.1117  0.0348  0
      1.0  0.7817  0.6395  0.4973  0.3717  0.2712  0.1799  0.1113  0.0360  0
      1.2  0.7205  0.5968  0.4731  0.3610  0.2644  0.1766  0.1092  0.0359  0
      1.4  0.6367  0.5352  0.4337  0.3375  0.2508  0.1693  0.1050  0.0359  0
    </tableData>
   </table>
  </function>

</turbine_engine>
